** Copyright 2021 Arnaud Duval

** This file is part of Yeti.
**
** Yeti is free software: you can redistribute it and/or modify it under the terms
** of the GNU Lesser General Public License as published by the Free Software
** Foundation, either version 3 of the License, or (at your option) any later version.
**
** Yeti is distributed in the hope that it will be useful, but WITHOUT ANY WARRANTY;
** without even the implied warranty of MERCHANTABILITY or FITNESS FOR A PARTICULAR
** PURPOSE. See the GNU Lesser General Public License for more details.
**
** You should have received a copy of the GNU Lesser General Public License along
** with Yeti. If not, see <https://www.gnu.org/licenses/>

*Part, name=testU5
*USER ELEMENT, NODES=8, TYPE=U1, COORDINATES=3, INTEGRATION=8, TENSOR=THREED
1,2,3
*USER ELEMENT, NODES=1, TYPE=U5, COORDINATES=3, INTEGRATION=8, TENSOR=NONE
1
*Node, nset=Allnode
1,  3.0, 1.0, 2.0
2,  5.0, 3.0,  2.0
3,  1.0, 3.0, 2.0
4,  3.0, 5.0,  2.0
5,  3.0, 1.0, 5.0
6,  5.0, 3.0,  5.0
7,  1.0, 3.0, 5.0
8,  3.0, 5.0,  5.0

9, 6.0, 6.0, 2.0
10, 6.0, 6.0, 1.5
11, 6.0, 0.0, 2.0
12, 6.0, 0.0, 1.5
13, 0.0, 6.0, 2.0
14, 0.0, 6.0, 1.5
15, 0.0, 0.0, 2.0
16, 0.0, 0.0, 1.5

17, 0.0, 0.0, 0.0

*Element,type=U1,elset=Allels
1,  8, 7, 6, 5, 4, 3, 2, 1
2,  16, 15, 14, 13, 12, 11, 10, 9
*Element,type=U5,elset=Lagrange
3, 17
*ELSET,ELSET=EltPatch1,generate
1,1,1
*ELSET,ELSET=EltPatch2,generate
2,2,1
*ELSET,ELSET=EltPatch3,generate
3,3,1
*NSET,NSET=CPX0Patch2
13,14,15,16
*NSET,NSET=CPZmaxPatch1
5,6,7,8
*UEL PROPERTY, ELSET=EltPatch1, MATERIAL=MAT
1
*UEL PROPERTY, ELSET=EltPatch2, MATERIAL=MAT
2
*UEL PROPERTY, ELSET=EltPatch3, MATERIAL=MATvoid
3, 1, 5, 2, 1
** Maitre = patch 1 (face 5), esclave = patch 2 (face 1)
*End Part

** ASSEMBLY
*Assembly, name=Assembly
*Instance, name=I1, part=testU5
*End Instance
*End Assembly
*MATERIAL,NAME=MAT
*Elastic
210000., 0.3
*MATERIAL,NAME=MATvoid
*Elastic
0.0, 0.0
*STEP,extrapolation=NO, NLGEOM=NO
*Static
** BOUNDARY CONDITIONS
*Boundary
I1.CPX0Patch2, 1, 3, 0.0
** DLOAD
*DLOAD
I1.EltPatch1, U60, 1.
** OUTPUT REQUESTS
*node file, frequency=1
U,RF,CF
*el file, frequency=1
SDV
*End Step
