** Copyright 2022 Arnaud Duval

** This file is part of Yeti.
**
** Yeti is free software: you can redistribute it and/or modify it under the terms
** of the GNU Lesser General Public License as published by the Free Software
** Foundation, either version 3 of the License, or (at your option) any later version.
**
** Yeti is distributed in the hope that it will be useful, but WITHOUT ANY WARRANTY;
** without even the implied warranty of MERCHANTABILITY or FITNESS FOR A PARTICULAR
** PURPOSE. See the GNU Lesser General Public License for more details.
**
** You should have received a copy of the GNU Lesser General Public License along
** with Yeti. If not, see <https://www.gnu.org/licenses/>

*HEADING
*Part, name=Cube
*USER ELEMENT, NODES=8, TYPE=U0, COORDINATES=3, INTEGRATION=8, TENSOR=NONE
1,2,3
*USER ELEMENT, NODES=8, TYPE=U10, COORDINATES=3, INTEGRATION=8, TENSOR=THREED
1,2,3
*Node,nset=AllNode
1, 0.0,   0.0,   0.0
2, 100.0, 0.0,   0.0
3, 0.0,   100.0, 0.0
4, 100.0, 100.0, 0.0
5, 0.0,   0.0,   100.0
6, 100.0, 0.0,   100.0
7, 0.0,   100.0, 100.0
8, 100.0, 100.0, 100.0
9,  0.00,  0.00,  0.00
10, 0.50,  0.00,  0.00
11, 0.00,  0.06,  0.05
12, 0.50,  0.06,  0.05
13, 0.00,  0.00,  0.15
14, 0.50,  0.00,  0.15
15, 0.00,  0.06,  0.10
16, 0.50,  0.06,  0.10
*Element,type=U0,elset=MappingEls
1, 8, 7, 6, 5, 4, 3, 2, 1
*Element,type=U10,elset=VolumeEls
2, 16, 15, 14, 13, 12, 11, 10, 9
*ELSET,ELSET=EltPatch1,generate
1,1,1
*ELSET,ELSET=EltPatch2,generate
2,2,2
*ELSET,ELSET=EltToLoad
2
*NSET,NSET=MapCP,generate
1,8,1
*NSET,NSET=CPonX0
9, 11, 13, 15
*UEL PROPERTY, ELSET=EltPatch1, MATERIAL=MATvoid
1
*UEL PROPERTY, ELSET=EltPatch2, MATERIAL=MAT
2, 1
*End Part
*Assembly, name=Assembly
*Instance, name=I1, part=Cube
*End Instance
*End Assembly**MATERIAL
*MATERIAL,NAME=MAT
*Elastic
30000000000.0, 0.30
*MATERIAL,NAME=MATvoid
*Elastic
30000000000.0, 0.30
*STEP,extrapolation=NO,NLGEOM=NO
*Static
** BOUNDARY CONDITIONS
** Name: DEP Type: Displacement/Rotation
*Boundary
I1.CPonX0,  1, 3, 0.00
I1.MapCP, 1, 3, 0.0
**
** DLOAD
*Dload
I1.EltPatch2, U30, 1000.
**
** OUTPUT REQUESTS
*node file, frequency=1
U,RF,CF
*el file, frequency=1
SDV
*End Step
