** Copyright 2022 Arnaud Duval

** This file is part of Yeti.
**
** Yeti is free software: you can redistribute it and/or modify it under the terms
** of the GNU Lesser General Public License as published by the Free Software
** Foundation, either version 3 of the License, or (at your option) any later version.
**
** Yeti is distributed in the hope that it will be useful, but WITHOUT ANY WARRANTY;
** without even the implied warranty of MERCHANTABILITY or FITNESS FOR A PARTICULAR
** PURPOSE. See the GNU Lesser General Public License for more details.
**
** You should have received a copy of the GNU Lesser General Public License along
** with Yeti. If not, see <https://www.gnu.org/licenses/>

*HEADING
*Part, name=Cube
*USER ELEMENT, NODES=27, TYPE=U0, COORDINATES=3, INTEGRATION=27, TENSOR=NONE
1,2,3
*USER ELEMENT, NODES=27, TYPE=U10, COORDINATES=3, INTEGRATION=27, TENSOR=THREED
1,2,3
*Node,nset=AllNode
1, 0.0, 0.0, 0.0
2, 1.0, 0.0, 0.0
3, 2.0, 0.0, 0.0
4, 0.0, 1.0, 0.0
5, 1.0, 1.0, 0.0
6, 2.0, 1.0, 0.0
7, 0.0, 3.0, 0.0
8, 1.0, 3.0, 0.0
9, 2.0, 3.0, 0.0
10, 0.0, 0.0, 1.0
11, 1.0, 0.0, 1.0
12, 2.0, 0.0, 1.0
13, 0.0, 1.0, 1.0
14, 1.0, 1.0, 1.0
15, 2.0, 1.0, 1.0
16, 0.0, 3.0, 1.0
17, 1.0, 3.0, 1.0
18, 2.0, 3.0, 1.0
19, 0.0, 0.0, 2.0
20, 1.0, 0.0, 2.0
21, 2.0, 0.0, 2.0
22, 0.0, 1.0, 2.0
23, 1.0, 1.0, 2.0
24, 2.0, 1.0, 2.0
25, 0.0, 3.0, 2.0
26, 1.0, 3.0, 2.0
27, 2.0, 3.0, 2.0
28, 0.25, 0.25, 0.25
29, 0.5, 0.25, 0.25
30, 0.75, 0.25, 0.25
31, 0.25, 0.5, 0.25
32, 0.5, 0.5, 0.25
33, 0.75, 0.5, 0.25
34, 0.25, 0.75, 0.25
35, 0.5, 0.75, 0.25
36, 0.75, 0.75, 0.25
37, 0.25, 0.25, 0.5
38, 0.5, 0.25, 0.5
39, 0.75, 0.25, 0.5
40, 0.25, 0.5, 0.5
41, 0.5, 0.5, 0.5
42, 0.75, 0.5, 0.5
43, 0.25, 0.75, 0.5
44, 0.5, 0.75, 0.5
45, 0.75, 0.75, 0.5
46, 0.25, 0.25, 0.75
47, 0.5, 0.25, 0.75
48, 0.75, 0.25, 0.75
49, 0.25, 0.5, 0.75
50, 0.5, 0.5, 0.75
51, 0.75, 0.5, 0.75
52, 0.25, 0.75, 0.75
53, 0.5, 0.75, 0.75
54, 0.75, 0.75, 0.75
*Element,type=U0,elset=MappingEls
1,    27,26,25,24,23,22,21,20,19,18,17,16, 15, 14, 13, 12,11,10,9,8,7,6,5,4,3,2,1
*Element,type=U10,elset=VolumeEls
2, 54, 53, 52, 51, 50, 49, 48, 47, 46, 45, 44, 43, 42, 41, 40, 39, 38, 37, 36, 35, 34, 33, 32, 31, 30, 29, 28
*ELSET,ELSET=EltPatch1
1
*ELSET,ELSET=EltPatch2
2
*ELSET,ELSET=EltToLoad
2
*NSET,NSET=MapCP,generate
1,27,1
*NSET,NSET=CPcubeX0
28, 31, 34, 37, 40, 43, 46, 49, 52
*NSET,NSET=CPcubeY0
28, 29, 30, 37, 38, 39, 46, 47, 48
*NSET,NSET=CPcubeZ0
28, 29, 30, 31, 32, 33, 34, 35, 36
*UEL PROPERTY, ELSET=EltPatch1, MATERIAL=MATvoid
1
*UEL PROPERTY, ELSET=EltPatch2, MATERIAL=MAT
2, 1
*End Part
*Assembly, name=Assembly
*Instance, name=I1, part=Cube
*End Instance
*End Assembly
*MATERIAL,NAME=MAT
*Elastic
210000, 0.0
*Density
1.2
*MATERIAL,NAME=MATvoid
*Elastic
0.0, 0.0
*STEP,extrapolation=NO,NLGEOM=NO
*Static
**
*Boundary
I1.MapCP, 1, 3, 0.0
I1.CPcubeX0, 1, 1, 0.0
I1.CPcubeY0, 2, 2, 0.0
I1.CPcubeZ0, 1, 1, 0.0
I1.CPcubeZ0, 3, 3, 0.0
**
*Dload
I1.EltToLoad, U60, 2.0
** OUTPUT REQUESTS
*node file, frequency=1
U,RF,CF
*el file, frequency=1
SDV
*End Step
