** Copyright 2020 Arnaud Duval

** This file is part of Yeti.
**
** Yeti is free software: you can redistribute it and/or modify it under the terms
** of the GNU Lesser General Public License as published by the Free Software
** Foundation, either version 3 of the License, or (at your option) any later version.
**
** Yeti is distributed in the hope that it will be useful, but WITHOUT ANY WARRANTY;
** without even the implied warranty of MERCHANTABILITY or FITNESS FOR A PARTICULAR
** PURPOSE. See the GNU Lesser General Public License for more details.
**
** You should have received a copy of the GNU Lesser General Public License along
** with Yeti. If not, see <https://www.gnu.org/licenses/>

*HEADING
** A beam with 2 triangularly distributed pressure on 2 different faces (2, then 4)
*Part, name=Piece
*USER ELEMENT, NODES=8, TYPE=U1, COORDINATES=3, INTEGRATION=8, TENSOR=THREED
1,2,3
*Node,nset=AllNode
1, 0.0,  0.0,  0.0
2, 0.0,  3.0,  0.0
3, 0.0,  0.0,  1.0
4, 0.0,  3.0,  1.0
5, 20.0,  0.0,  0.0
6, 20.0,  3.0,  0.0
7, 20.0,  0.0,  1.0
8, 20.0,  3.0,  1.0
*Element, type=U1,elset=AllEls
1,    8,7,6,5,4,3,2,1
*ELSET,ELSET=EltPatch1,generate
1,1, 1
*NSET,NSET=CPonX0
1,2,3,4
*UEL PROPERTY, ELSET=EltPatch1, MATERIAL=Mat
1
*End Part
*DISTRIBUTION, NAME=presfield_face4, LOCATION=NODE
3, 1000.0
4, 1000.0
7, 0.
8, 0.
*DISTRIBUTION, NAME=presfield_face2, LOCATION=NODE
2, 0.
4, 0.
6, 666.
8, 666.
** ASSEMBLY
*Assembly, name=Assembly
*Instance, name=I1, part=Piece
*End Instance
*End Assembly
**MATERIAL
*MATERIAL,NAME=Mat
*Density
8.25e-09
*Elastic
210000.0, 0.30
*STEP,extrapolation=NO,NLGEOM=NO
*Static
** BOUNDARY CONDITIONS
** Name: DEP Type: Displacement/Rotation
*Boundary
I1.CPonX0,  1, 3, 0.00
**
** DLOAD
*Dload
I1.EltPatch1, U44, presfield_face4
I1.EltPatch1, U24, presfield_face2
I1.EltPatch1, U101, 1.e5, 3., 0., 0., 5., 3., 1.
** OUTPUT REQUESTS
*node file, frequency=1
U,RF,CF
*el file, frequency=1
SDV
*End Step
