** Copyright 2021 Arnaud Duval

** This file is part of Yeti.
**
** Yeti is free software: you can redistribute it and/or modify it under the terms
** of the GNU Lesser General Public License as published by the Free Software
** Foundation, either version 3 of the License, or (at your option) any later version.
**
** Yeti is distributed in the hope that it will be useful, but WITHOUT ANY WARRANTY;
** without even the implied warranty of MERCHANTABILITY or FITNESS FOR A PARTICULAR
** PURPOSE. See the GNU Lesser General Public License for more details.
**
** You should have received a copy of the GNU Lesser General Public License along
** with Yeti. If not, see <https://www.gnu.org/licenses/>

*Part, name=Conge
*USER ELEMENT, NODES=27, TYPE=U1, COORDINATES=3, INTEGRATION=27, TENSOR=THREED
1,2,3
*USER ELEMENT, NODES=4, TYPE=U00, COORDINATES=3, INTEGRATION=4, TENSOR=NONE
1,2,3
*USER ELEMENT, NODES=1, TYPE=U4,  COORDINATES=3, INTEGRATION=4, TENSOR=NONE
1,2,3
*Node, nset=AllNode
1,  8.0,    0.0,    0.0
2,  8.5,    0.0,    0.0
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

*Element,type=U1,elset=AllEls
1,  27, 26, 25, 24, 23, 22, 21, 20, 19, 18, 17, 16, 15, 14, 13, 12, 11, 10, 9, 8, 7, 6, 5, 4, 3, 2, 1
2,  39, 38, 37, 36, 35, 34, 33, 32, 31, 30, 29, 28
3,  51, 50, 49, 48, 47, 46, 45, 44, 43, 42, 41, 40
*Element,type=U00,elset=Inter
4, 55, 54, 53, 52
5, 59, 58, 57, 56
6, 63, 62, 61, 60
7, 67, 66, 65, 64
8, 71, 70, 69, 68
9, 75, 74, 73, 72
*Element,type=U4,elset=Lagrange
10, 76
11, 77
12, 78
*ELSET,ELSET=EltPatch1,generate
1,1,1
*ELSET,ELSET=EltPatch2,generate
2,2,1
*ELSET,ELSET=EltPatch3,generate
3,3,1
*ELSET,ELSET=EltPatch4,generate
4,4,1
*ELSET,ELSET=EltPatch5,generate
5,5,1
*ELSET,ELSET=EltPatch6,generate
6,6,1
*ELSET,ELSET=EltPatch7,generate
7,7,1
*ELSET,ELSET=EltPatch8,generate
8,8,1
*ELSET,ELSET=EltPatch9,generate
9,9,1
*ELSET,ELSET=EltPatch10,generate
10,10,1
*ELSET,ELSET=EltPatch11,generate
11,11,1
*ELSET,ELSET=EltPatch12,generate
12,12,1
*NSET,NSET=CPatZmin
40, 41, 42, 43, 44, 45
*NSET,NSET=CPatX0Patch1
7,8,9,16,17,18,25,26,27
*NSET,NSET=CPatX0Patch2
32,33,38,39
*NSET,NSET=CPatX0Patch3
44,45,50,51
*NSET,NSET=CPatY0Patch1
1,2,3,10,11,12,19,20,21
*NSET,NSET=CPatY0Patch2
28,29,34,35
*NSET,NSET=CPatY0Patch3
40,41,46,47
*NSET,NSET=CPpatch4,generate
52,55,1
*NSET,NSET=CPpatch5,generate
56,59,1
*NSET,NSET=CPpatch6,generate
60,63,1
*NSET,NSET=CPpatch7,generate
64,67,1
*NSET,NSET=CPpatch8,generate
68,71,1
*NSET,NSET=CPpatch9,generate
72,75,1
*UEL PROPERTY, ELSET=EltPatch1, MATERIAL=MAT
1
*UEL PROPERTY, ELSET=EltPatch2, MATERIAL=MAT
2
*UEL PROPERTY, ELSET=EltPatch3, MATERIAL=MAT
3
*UEL PROPERTY, ELSET=EltPatch4, MATERIAL=MATvoid
4, 3, 10, 1
*UEL PROPERTY, ELSET=EltPatch5, MATERIAL=MATvoid
5, 1, 10, 0
*UEL PROPERTY, ELSET=EltPatch6, MATERIAL=MATvoid
6, 3, 11, 1
*UEL PROPERTY, ELSET=EltPatch7, MATERIAL=MATvoid
7, 2, 11, 0
*UEL PROPERTY, ELSET=EltPatch8, MATERIAL=MATvoid
8, 2, 12, 1
*UEL PROPERTY, ELSET=EltPatch9, MATERIAL=MATvoid
9, 1, 12, 0
*UEL PROPERTY, ELSET=EltPatch10, MATERIAL=MATvoid
10, 0
*UEL PROPERTY, ELSET=EltPatch11, MATERIAL=MATvoid
11, 0
*UEL PROPERTY, ELSET=EltPatch12, MATERIAL=MATvoid
12, 0
*End Part
** ASSEMBLY
*Assembly, name=Assembly
*Instance, name=I1, part=Conge
*End Instance
*End Assembly
*MATERIAL,NAME=MAT
*Elastic
210000., 0.30
*MATERIAL,NAME=MATvoid
*Elastic
0.0, 0.0
*STEP,extrapolation=NO, NLGEOM=NO
*Static
** BOUNDARY CONDITION
*Boundary
I1.CPatZmin, 1, 3, 0.
I1.CPatX0Patch1, 1, 3, 0.
I1.CPatX0Patch2, 1, 3, 0.
I1.CPatX0Patch3, 1, 3, 0.
I1.CPatY0Patch1, 1, 3, 0.
I1.CPatY0Patch2, 1, 3, 0.
I1.CPatY0Patch3, 1, 3, 0.
I1.CPpatch4, 1, 3, 0.
I1.CPpatch5, 1, 3, 0.
I1.CPpatch6, 1, 3, 0.
I1.CPpatch7, 1, 3, 0.
I1.CPpatch8, 1, 3, 0.
I1.CPpatch9, 1, 3, 0.
** DLOAD
*DLOAD
I1.EltPatch2, U10, 1.
** OUTPUT REQUESTS
*node file, frequency=1
U,RF,CF
*el file, frequency=1
SDV
*End Step
