** Copyright 2023 Arnaud Duval

** This file is part of Yeti.
**
** Yeti is free software: you can redistribute it and/or modify it under the terms
** of the GNU Lesser General Public License as published by the Free Software
** Foundation, either version 3 of the License, or (at your option) any later version.
**
** Yeti is distributed in the hope that it will be useful, but WITHOUT ANY WARRANTY;
** without even the implied warranty of MERCHANTABILITY or FITNESS FOR A PARTICULAR
** PURPOSE. See the GNU Lesser General Public License for more details.
**
** You should have received a copy of the GNU Lesser General Public License along
** with Yeti. If not, see <https://www.gnu.org/licenses/>

*HEADING
**YETI  Laboratoire de Mécanique des Contacts et des Structures - CNRS - INSA Lyon
*Part, name=HalfTube
*USER ELEMENT, NODES=12, TYPE=U1, COORDINATES=3, INTEGRATION=12, TENSOR=THREED
1,2,3
*USER ELEMENT, NODES=1, TYPE=U5, COORDINATES=3, INTEGRATION=8, TENSOR=NONE
1
*Node,nset=AllNodes
1, 1.0, 0.0, 4.0
2, 1.0, 1.0, 4.0
3, 0.0, 1.0, 4.0
4, 2.0, 0.0, 4.0
5, 2.0, 2.0, 4.0
6, 0.0, 2.0, 4.0
7, 1.0, 0.0, 1.0
8, 1.0, 1.0, 1.0
9, 0.0, 1.0, 1.0
10, 2.0, 0.0, 1.0
11, 2.0, 2.0, 1.0
12, 0.0, 2.0, 1.0

13, 0.0, 1.0, 4.0
14, -1.0, 1.0, 4.0
15, -1.0, 0.0, 4.0
16, 0.0, 2.0, 4.0
17, -2.0, 2.0, 4.0
18, -2.0, 0.0, 4.0
19, 0.0, 1.0, 1.0
20, -1.0, 1.0, 1.0
21, -1.0, 0.0, 1.0
22, 0.0, 2.0, 1.0
23, -2.0, 2.0, 1.0
24, -2.0, 0.0, 1.0

25, 0.0, 0.0, 0.0

*Element, type=U1,elset=AllElts
1,  12, 11, 10, 9, 8, 7, 6, 5, 4, 3, 2, 1
2,  24, 23, 22, 21, 20, 19, 18, 17, 16, 15, 14, 13
*Element, type=U5, elset=Lagrange
3, 25
*ELSET,ELSET=EltPatch1,generate
1, 1, 1
*ELSET,ELSET=EltPatch2,generate
2, 2, 1
*ELSET,ELSET=EltPatch3,generate
3, 3, 1
*ELSET,ELSET=EltToLoadP1,generate
1, 1, 1
*ELSET,ELSET=EltToLoadP2,generate
2, 2, 1
*NSET,NSET=CPatTopP1
1, 2, 3, 4, 5, 6
*NSET,NSET=CPatTopP2
13, 14, 15, 16, 17, 18
*UEL PROPERTY, ELSET=EltPatch1, MATERIAL=MAT
1
*UEL PROPERTY, ELSET=EltPatch2, MATERIAL=MAT
2
*UEL PROPERTY, ELSET=EltPatch3, MATERIAL=MATvoid
3, 1, 2, 2, 1
*End Part
** ASSEMBLY
*Assembly, name=Assembly
*Instance, name=I1, part=HalfTube
*End Instance
*End Assembly
** MATERIAL
*MATERIAL,NAME=MAT
*Elastic
210000., 0.3
*MATERIAL,NAME=MATvoid
*Elastic
0.0, 0.0
*STEP,extrapolation=NO,NLGEOM=NO
*Static
** BOUNDARY CONDITIONS
*Boundary
I1.CPatTopP1, 1, 3, 0.
I1.CPatTopP2, 1, 3, 0.
** DLOAD
*Dload
I1.EltToLoadP1, U30, 1.
I1.EltToLoadP2, U30, 1.
** OUTPUT REQUESTS
*node file, frequency=1
U,RF,CF
*el file, frequency=1
SDV
*End Step
