*HEADING
**Job name:PlateWithHolem.txt
**NurbsABQ - Laboratoire de Mecanique des Contacts et des Solides - INSA-Lyon
*Part, name=Piece
*USER ELEMENT, NODES=4, TYPE=U1,  COORDINATES=2, INTEGRATION=4, TENSOR=PSTRESS
1,2
*USER ELEMENT, NODES=1, TYPE=U5,  COORDINATES=1, INTEGRATION=1, TENSOR=NONE
1
*Node,nset=AllNode
1, -10.0,  0.00
2,  0.00,  0.00
3, -10.0,  5.00
4,  0.00,  5.00
5,  0.00,  0.00
6,  10.0,  0.00
7,  0.00,  5.00
8,  10.0,  5.00
9,  0.00,  0.00
** 1, -10.0,  0.00
** 2,  0.00,  0.00
** 3, -10.0,  1.00
** 4,  0.00,  1.00
** 5,  0.00,  0.00
** 6,  10.0,  0.00
** 7,  0.00,  1.00
** 8,  10.0,  1.00
** 9,  0.00,  0.00
*Element,type=U1, elset=AllEls
1,    4, 3, 2, 1
2,    8, 7, 6, 5
*Element,type=U5, elset=Lagrange
3,   9
*ELSET,ELSET=EltPAtch1,generate
1,1, 1
*ELSET,ELSET=EltPAtch2,generate
2,2, 1
*ELSET,ELSET=EltPAtch3,generate
3,3, 1
*NSET,NSET=CPatX0patch1
1,3
*NSET,NSET=CPatY0patch1
1,2
*NSET,NSET=CPatXMpatch2
6,8
*NSET,NSET=CPatY0patch2
5,6
*NSET,NSET=CPlgrge
9
*NSET,NSET=CP1
1
*NSET,NSET=CP2
2
*NSET,NSET=CP3
3
*NSET,NSET=CP4
4
*NSET,NSET=CP5
5
*NSET,NSET=CP6
6
*NSET,NSET=CP7
7
*NSET,NSET=CP8
8
**
*UEL PROPERTY, ELSET=EltPAtch1, MATERIAL=MAT
1
*UEL PROPERTY, ELSET=EltPAtch2, MATERIAL=MAT
2
*UEL PROPERTY, ELSET=EltPAtch3, MATERIAL=MATvoid
3, 2, 1, 1, 2, 0
** Maitre = patch 2 (face 1), esclave = patch 1 (face 2), continuité C1
*End Part
** ASSEMBLY
*Assembly, name=Assembly
*Instance, name=I1, part=Piece
*End Instance
*End Assembly
**MATERIAL
*MATERIAL,NAME=MAT
*Elastic
60.e9, 0.30
*MATERIAL,NAME=MAT2
*Elastic
30.e9, 0.30
*MATERIAL,NAME=MATvoid
*Elastic
0.00, 0.00
*STEP,extrapolation=NO,NLGEOM=NO
*Static
** BOUNDARY CONDITIONS
** Name: DEP Type: Displacement/Rotation
*Boundary
** I1.CPatXMpatch2,  1, 2, 0.
** I1.CP1,  1, 1, 1.
** I1.CP1,  2, 2, 1.5
** I1.CP2,  1, 1, 2.
** I1.CP2,  2, 2, 2.5
** I1.CP3,  1, 1, 3.
** I1.CP3,  2, 2, 3.5
** I1.CP4,  1, 1, 4.
** I1.CP4,  2, 2, 4.5
**I1.CPatY0patch2,  1, 2, 0.
**I1.CPlgrge,       1, 2, 0.
**
** DLOAD
*Dload
** I1.EltPAtch2, U22,  1000.00
** I1.EltPAtch2, U21,  1000.00
**I1.EltPAtch1, U11, -1.00
** CLOAD
** *Cload
** 8, 2, -1.0
** OUTPUT REQUESTS
*node file, frequency=1
U,RF,CF
*el file, frequency=1
SDV
*End Step
