*HEADING
**Job name:PlateWithHolem.txt
**NurbsABQ - Laboratoire de Mecanique des Contacts et des Solides - INSA-Lyon
*Part, name=Piece
*USER ELEMENT, NODES=4, TYPE=U1,  COORDINATES=2, INTEGRATION=4, TENSOR=PSTRESS
1,2
*USER ELEMENT, NODES=2, TYPE=U00, COORDINATES=2, INTEGRATION=4, TENSOR=NONE
1,2
*USER ELEMENT, NODES=1, TYPE=U4,  COORDINATES=1, INTEGRATION=4, TENSOR=NONE
1,2
*Node,nset=AllNode
    1, -10.0,  0.00
    2, -5.00,  0.00
    3,  0.00,  0.00
    4, -10.0,  1.25
    5, -4.00,  1.25
    6,  1.00,  1.25
    7, -10.0,  3.75
    8, -6.00,  3.75
    9,  -1.00,  3.75
    10, -10.0,  5.0
    11, -5.00,  5.0
    12,  0.00,  5.0
    13, 0.00,  0.00
    14, 5.00,  0.00
    15, 10.0,  0.00
    16, 1.00,  1.25
    17, 6.00,  1.25
    18, 10.0,  1.25
    19, -1.00,  3.75
    20, 4.00,  3.75
    21, 10.0,  3.75
    22, 0.00,  5.00
    23, 5.00,  5.00
    24, 10.0,  5.00
    25, 1.00,  0.00
    26, 1.00,  1.00
    27, 0.00,  0.00
    28, 0.00,  1.00
    29, 0.00,  0.00
*Element,type=U1, elset=AllEls
1,    9, 8, 7, 6, 5, 4, 3, 2, 1
2,    12, 11, 10, 9, 8, 7, 6, 5, 4
3,    21, 20, 19, 18, 17, 16, 15, 14, 13
4,    24, 23, 22, 21, 20, 19, 18, 17, 16
*Element,type=U00,elset=EmbedInterface
5,   26,25
6,   28,27
*Element,type=U4, elset=Lagrange
7,   29
*ELSET,ELSET=EltPAtch1,generate
1,2, 1
*ELSET,ELSET=EltPAtch2,generate
3,4, 1
*ELSET,ELSET=EltPAtch3,generate
5,5, 1
*ELSET,ELSET=EltPAtch4,generate
6,6, 1
*ELSET,ELSET=EltPAtch5,generate
7,7, 1
*NSET,NSET=CPatX0patch1
1,4,7,10
*NSET,NSET=CPatY0patch1
1,2,3
*NSET,NSET=CPatXMpatch2
12,15,18
*NSET,NSET=CPatY0patch2
15,18,21,24
*NSET,NSET=CPinterface1
25,26
*NSET,NSET=CPinterface2
27,28
*NSET,NSET=CPlgrge
29
**
*UEL PROPERTY, ELSET=EltPAtch1, MATERIAL=MAT
1
*UEL PROPERTY, ELSET=EltPAtch2, MATERIAL=MAT
2
*UEL PROPERTY, ELSET=EltPAtch3, MATERIAL=MATvoid
3, 1, 5, 1
*UEL PROPERTY, ELSET=EltPAtch4, MATERIAL=MATvoid
4, 2, 5, 0
*UEL PROPERTY, ELSET=EltPAtch5, MATERIAL=MATvoid
5, 0
*End Part
** ASSEMBLY
*Assembly, name=Assembly
*Instance, name=I1, part=Piece
*End Instance
*End Assembly
**MATERIAL
*MATERIAL,NAME=MAT
*Elastic
60.e9, 0.30
*MATERIAL,NAME=MAT2
*Elastic
30.e9, 0.30
*MATERIAL,NAME=MATvoid
*Elastic
0.00, 0.00
*STEP,extrapolation=NO,NLGEOM=NO
*Static
** BOUNDARY CONDITIONS
** Name: DEP Type: Displacement/Rotation
*Boundary
I1.CPatX0patch1,  1, 2, 0.
I1.CPinterface1,  1, 2, 0.
I1.CPinterface2,  1, 2, 0.
**I1.CPatXMpatch2,  1, 1, 0.
**I1.CPatY0patch2,  1, 2, 0.
**I1.CPlgrge,       1, 2, 0.
**
** DLOAD
*Dload
I1.EltPAtch2, U22,  1000.00
**I1.EltPAtch1, U11, -1.00
** CLOAD
** *Cload
** 8, 2, -1.0
** OUTPUT REQUESTS
*node file, frequency=1
U,RF,CF
*el file, frequency=1
SDV
*End Step
