** Copyright 2020 Thibaut Hirschler
** Copyright 2020 Arnaud Duval

** This file is part of Yeti.
**
** Yeti is free software: you can redistribute it and/or modify it under the terms
** of the GNU Lesser General Public License as published by the Free Software
** Foundation, either version 3 of the License, or (at your option) any later version.
**
** Yeti is distributed in the hope that it will be useful, but WITHOUT ANY WARRANTY;
** without even the implied warranty of MERCHANTABILITY or FITNESS FOR A PARTICULAR
** PURPOSE. See the GNU Lesser General Public License for more details.
**
** You should have received a copy of the GNU Lesser General Public License along
** with Yeti. If not, see <https://www.gnu.org/licenses/>

*HEADING
**NurbsABQ - Laboratoire de Mecanique des Contacts et des Solides - INSA-Lyon
*Part, name=Piece
*USER ELEMENT, NODES=9, TYPE=U1, COORDINATES=2, INTEGRATION=9, TENSOR=PSTRESS
1,2
*Node,nset=AllNode
    1,  0.0,  0.0, 0.00
    2,  1.5, 0.0, 0.0
    3,  3.0,  0.0, 0.00
    4,  4.5, 0.0, 0.00
    5,  6.0,  0.0, 0.00
    6,  0.0,  0.5, 0.00
    7,  1.5, 0.5, 0.0
    8,  3.0,  0.5, 0.00
    9,  4.5, 0.5, 0.00
    10, 6.0,  0.5, 0.00
    11, 0.0,  1.0, 0.00
    12, 1.5,  1.0, 0.0
    13, 3.0,  1.0, 0.00
    14, 4.5, 1.0, 0.00
    15, 6.0,  1.0, 0.00
*Element,type=U1,elset=AllEls
1,    13, 12, 11, 8, 7, 6, 3, 2, 1
2,    15, 14, 13, 10, 9, 8, 5, 4, 3
*ELSET,ELSET=EltPAtch1,generate
1,2, 1
*NSET,NSET=CPtoBlockX0
1,3
*UEL PROPERTY, ELSET=EltPAtch1, MATERIAL=MAT
1
*End Part
** ASSEMBLY
*Assembly, name=Assembly
*Instance, name=I1, part=Piece
*End Instance
*End Assembly
**MATERIAL
*MATERIAL,NAME=MAT
*Elastic
210000., 0.3
*STEP,extrapolation=NO,NLGEOM=NO
*Static
** BOUNDARY CONDITIONS
** Name: DEP Type: Displacement/Rotation
*Boundary
I1.CPtoBlockX0, 1, 2, 0.
**
** CLOAD
*Cload
2, 2, -10.0
**
** OUTPUT REQUESTS
*node file, frequency=1
U,RF,CF
*el file, frequency=1
SDV
*End Step
